x := 1.1
n := 10, 11 .. 15
f(x, n) := nthroot(sin(π*n/(x + 3)), 3)*sum(sqrt(nthroot(x^(k + 1), k) + nthroot(e^(k - 2/3), k))/(1 + ln(x)), k = 1 .. n)
n = [10; 11; 12; 13; 14; 15]
f(x, n) = [16.7091; 17.5085; 12.4063; -17.6417; -23.5349; -24.4991]
