x := 0.5
sum(x^(2*k + 1)/((4*k + 1)*(4*k + 3)), k = 0 .. 4) - sum(x^(2*k + 1)/((4*k + 1)*(4*k + 3)), k = 0 .. 3) = 6.04683e-6
sum(x^(2*k + 1)/((4*k + 1)*(4*k + 3)), k = 0 .. 4) = 0.1706
Eps1 := 0.00001
Eps1 ≥ 0.000006
x := 0.5
sum(x^(2*k + 1)/((4*k + 1)*(4*k + 3)), k = 0 .. 6) - sum(x^(2*k + 1)/((4*k + 1)*(4*k + 3)), k = 0 .. 5) = 1.80845e-7
sum(x^(2*k + 1)/((4*k + 1)*(4*k + 3)), k = 0 .. 6) = 0.170601
Eps2 := 0.000001
Eps2 ≥ 0.0000002
